# Hexapod 2G
# Обратная задача кинематики
# Константы (длины звеньев)
# Точка назначения
# (координаты конца лапы)
# Версия 1
OA := 37
AB := 44
BC := 83
Destination := [110; 110; 0]  # Версия 2
OA := 41.5
AB := 44
BC := 81.32
BC := 85
x := Destination[0] = 110
y := Destination[1] = 110
z := Destination[2] = 0  # Решение для передней правой лапы
p := sqrt(x^2 + y^2) = 155.563
OC := sqrt(p^2 + z^2) = 155.563
AC := sqrt((p - OA)^2 + z^2) = 114.063
Qrad := atan(z/(p - OA)) = 0
Q0rad := acos((AB^2 + AC^2 - BC^2)/(2*AB*AC)) = 0.693119
q0rad := atan(y/x) = 0.785398
q1rad := Qrad + Q0rad = 0.693119
q2rad := acos((AB^2 + BC^2 - AC^2)/(2*AB*BC)) = 2.11138
q0real := q0rad*180/π = 45
q1real := q1rad*180/π = 39.7128
q2real := q2rad*180/π = 120.973
q0 := q0real + 45 = 90
q1 := q1real + 90 = 129.713
q2 := q2real = 120.973
Ap := OA
Bp := OA + AB*cos(q1rad) = 75.3473
Cp := p = 155.563
Ax := OA*cos(q0rad) = 29.3449
Bx := Bp*cos(q0rad) = 53.2786
Cx := x = 110
Ay := OA*sin(q0rad) = 29.3449
By := Bp*sin(q0rad) = 53.2786
Cy := y = 110
Az := 0
Bz := AB*sin(q1rad) = 28.1134
Cz := z = 0
CoordY := [0; Ay; By; Cy] = [0; 29.3449; 53.2786; 110]
CoordX := [0; Ax; Bx; Cx] = [0; 29.3449; 53.2786; 110]
CoordZ := [0; Az; Bz; Cz] = [0; 0; 28.1134; 0]
CoordP := [0; Ap; Bp; Cp] = [0; 41.5; 75.3473; 155.563]
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# Решение прямой задачи кинематики
q0 := 90
q1 := 90
q0real := q0 - 45 = 45
q2 := 90
q1real := q1 - 90 = 0
q2real := 180 - q2 = 90
q0rad := q0real*π/180 = 0.785398
q1rad := q1real*π/180 = 0
q2rad := q2real*π/180 = 1.5708
Bp := OA + AB*cos(q1rad) = 85.5
Cp := Bp + BC*cos(π - q1rad - q2rad) = 85.5
Ap := OA = 41.5
Ax := Ap*cos(q0rad) = 29.3449
Bx := Bp*cos(q0rad) = 60.4576
Cx := Cp*cos(q0rad) = 60.4576
Ay := Ap*sin(q0rad) = 29.3449
By := Bp*sin(q0rad) = 60.4576
Cy := Cp*sin(q0rad) = 60.4576
Az := 0
Bz := AB*sin(q1rad) = 0
Cz := Bz - BC*sin(π - q1rad - q2rad) = -85
Cx = 60.4576
CoordY := [0; Ay; By; Cy] = [0; 29.3449; 60.4576; 60.4576]
CoordX := [0; Ax; Bx; Cx] = [0; 29.3449; 60.4576; 60.4576]
Cy = 60.4576
CoordZ := [0; Az; Bz; Cz] = [0; 0; 0; -85]
CoordP := [0; Ap; Bp; Cp] = [0; 41.5; 85.5; 85.5]
Cz = -85
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# Траектория
DTG := π/180
Vy := 1
Wz := 30*DTG
B := [Vy; 0]
R(q) := [cos(q), -sin(q); sin(q), cos(q)]
C := R(Wz)*B = [0.866025; 0.5]
